*Heading
** Job name: KGD Model name: HF_circular
** Generated by: Abaqus/CAE 2016
*Preprint, echo=NO, model=NO, history=NO, contact=NO
**
** PARTS
**
*Part, name=Part-1
*Node
      1,  -6.15999985,  0.764999986
      2,  -6.15999985,  0.545000017
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*Element, type=CPS4R
1, 1, 2, 3, 4
2, 6, 5, 4, 3
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*Nset, nset=Set-1, generate
    1,  5787,     1
*Elset, elset=Set-1, generate
    1,  5753,     1
** Section: Section-1
*Solid Section, elset=Set-1, material=Material-1
300.,
*End Part
**
**
** ASSEMBLY
**
*Assembly, name=Assembly
**
*Instance, name=Part-1-1, part=Part-1
*End Instance
**
*Nset, nset=Set-1, instance=Part-1-1
   32,   35,   84,  129,  194,  254
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*Elset, elset=Set-1, instance=Part-1-1
   14,   49,   76,  121,  176,  251
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*Nset, nset=Set-2, instance=Part-1-1
  982,  983,  984,  985, 3525, 3526
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*Elset, elset=Set-2, instance=Part-1-1
  783,  790,  797,  804,  811,  818
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*Nset, nset=Set-3, instance=Part-1-1
 3584, 3585, 4291, 4292, 4293, 4294
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*Elset, elset=_Surf-1_S4, internal, instance=Part-1-1
 4215,
*Surface, type=ELEMENT, name=Surf-1
_Surf-1_S4, S4
*Enrichment, name=Crack-1, type=PROPAGATION CRACK, elset=_PickedSet36, interaction=IntProp-1
*End Assembly
**
** MATERIALS
**
*Material, name=Material-1
*Damage Initiation, criterion=MAXPS
 3.6,
*Damage Evolution, type=ENERGY
 0.184,
*Damage Stabilization
1e-05
*Elastic
35700., 0.1
**
** INTERACTION PROPERTIES
**
*Surface Interaction, name=IntProp-1
1.,
*Friction
0.,
*Surface Behavior, pressure-overclosure=HARD
** ----------------------------------------------------------------
**
** STEP: Step-2
**
*Step, name=Step-2, nlgeom=YES, inc=10000
*Static, riks
1., 1., 1e-05, 1e+10, ,
**
** BOUNDARY CONDITIONS
**
** Name: BC-1 Type: Displacement/Rotation
*Boundary
Set-2, 1, 1
Set-2, 2, 2
** Name: BC-2 Type: Displacement/Rotation
*Boundary
Set-1, 1, 1
**
** CONTROLS
**
*Controls, reset
*Controls, parameters=time incrementation
, , , , , , , 10, , ,
**
** OUTPUT REQUESTS
**
*Restart, write, frequency=0
**
** FIELD OUTPUT: F-Output-1
**
*Output, field
*Node Output
RF, U
*Element Output, directions=YES
E, S, STATUSXFEM
**
** HISTORY OUTPUT: H-Output-1
**
*Output, history, variable=PRESELECT
*End Step
