*Heading
** Job name: iso_calibration_fine Model name: calibration_fine
** Generated by: Abaqus/CAE 2018.HF3
*Preprint, echo=NO, model=NO, history=NO, contact=NO
**
** PARTS
**
*Part, name=Three_point_benidng_fine
*Node
      1,          -5.,          39.
      2,          -5.,          75.
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*Element, type=CPS4R
   1,   75,   76,  427,  297
   2,  256,  669,   78,   79
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*Nset, nset=Set-1, generate
    1,  4954,     1
*Elset, elset=Set-1, generate
    1,  4804,     1
** Section: Section-1
*Solid Section, elset=Set-1, material=Material-1
,
*End Part
**
**
** ASSEMBLY
**
*Assembly, name=Assembly
**
*Instance, name=Three_point_benidng_fine-1, part=Three_point_benidng_fine
*End Instance
**
*Nset, nset=Set-1, instance=Three_point_benidng_fine-1
  17,  18,  19,  20,  21,  22,  23,  24,  25, 184, 185
*Elset, elset=Set-1, instance=Three_point_benidng_fine-1
    8,   16,   53,   56,   59,   87,   95,  189, 1822, 1826
*Nset, nset=Set-2, instance=Three_point_benidng_fine-1
 2100,
*Nset, nset=Set-3, instance=Three_point_benidng_fine-1
    9, 1959
*Nset, nset=Set-4, instance=Three_point_benidng_fine-1, generate
 3901,  4202,     1
*Elset, elset=Set-4, instance=Three_point_benidng_fine-1, generate
 3739,  3888,     1
*End Assembly
**
** MATERIALS
**
*Material, name=Material-1
*Elastic
1.,2.
** ----------------------------------------------------------------
**
** STEP: Step-1
**
*Step, name=Step-1, nlgeom=NO
*Static
1., 1., 1e-05, 1.
**
** BOUNDARY CONDITIONS
**
** Name: BC-1 Type: Displacement/Rotation
*Boundary
Set-2, 1, 1, 1.
** Name: BC-3 Type: Displacement/Rotation
*Boundary
Set-1, 1, 1
Set-1, 2, 2
**
** OUTPUT REQUESTS
**
*Restart, write, frequency=0
**
** FIELD OUTPUT: F-Output-1
**
*Output, field, variable=PRESELECT
**
** HISTORY OUTPUT: H-Output-1
**
*Output, history, variable=PRESELECT
*End Step
